// COMSOL Multiphysics 5.6.0.280 model "cross-shape-parameterized-2-optm.mph"
// Outline of the model tree

Parameters
  r2 = 0.05[m]
  r1 = 0.03[m]
  c = 0.15[m]
  k = 400[W/(m*K)]
  k_ = 0.00000001[W/(m*K)]
  d = 0.005[m]
  rect_h = 0.04[m]
  squa_offset = 0.0005[m]
  d1_1 = d*0.4192323186083772
  d2_1 = d*0.15182330052643628
  d3_1 = d*0.42894438086518655
  d4_1 = d*0.033789425497825584
  d5_1 = d*0.8161986724650949
  d6_1 = d*0.15001190203707943
  d7_1 = d*0.48299061570153357
  d8_1 = d*0.08418310826276032
  d9_1 = d*0.4328262760357061
  d10_1 = d*0.24443717097734036
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  x1 = -r2+(d+squa_offset)*0
  y1 = -rect_h/2+(d+squa_offset)*0
  x2 = -r2+(d+squa_offset)*1
  y2 = -rect_h/2+(d+squa_offset)*0
  x3 = -r2+(d+squa_offset)*2
  y3 = -rect_h/2+(d+squa_offset)*0
  x4 = -r2+(d+squa_offset)*3
  y4 = -rect_h/2+(d+squa_offset)*0
  x5 = -r2+(d+squa_offset)*4
  y5 = -rect_h/2+(d+squa_offset)*0
  x6 = -r2+(d+squa_offset)*0
  y6 = -rect_h/2+(d+squa_offset)*1
  x7 = -r2+(d+squa_offset)*1
  y7 = -rect_h/2+(d+squa_offset)*1
  x8 = -r2+(d+squa_offset)*2
  y8 = -rect_h/2+(d+squa_offset)*1
  x9 = -r2+(d+squa_offset)*3
  y9 = -rect_h/2+(d+squa_offset)*1
  x10 = -r2+(d+squa_offset)*0
  y10 = -rect_h/2+(d+squa_offset)*2
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
Variables
  var1 "变量 1"
    r = sqrt(x^2+y^2)
    cos = x/r
    sin = y/r
    Rt = r1*(1-1/(1+exp((220-200)/2.5)))
    a = (r2-Rt)/r2
    r_1 = a*r+Rt
    Rb = r1/(1+exp((220-200)/2.5))
    r_b = a*r+Rb

Probes
  bnd1: Boundary "边界探针 1" on boundaries 401-417
    type = integral
    expr = ht.gradTx
    unit = K
    descr = 温度梯度，x 分量
    table = tbl1
  bnd2: Boundary "边界探针 2" on boundaries 384-400
    type = integral
    expr = ht2.gradTx
    unit = K
    descr = 温度梯度，x 分量
    table = tbl1

Geometry
  geom1 "几何 1" (2D, length unit m)
    c1: Circle "圆 1" (disabled) | r = r1
    c2: Circle "圆 2" (disabled) | r = r2
    r1: Rectangle "矩形 1" | pos = {-c/2, -0.02}; size = {c, 0.0435}
    ca1: CircularArc "圆弧 1"
      specify = endsr
      center = {0.00169821380406, 0.00175}
      r = 0.03
      point1 = {sqrt(0.0009-0.0004), -0.02}
      point2 = {sqrt(0.0009-0.0004), 0.0235}
      angle1 = 313.531152167
      angle2 = 46.4688478326
    ca2: CircularArc "圆弧 2"
      specify = endsr
      center = {-0.00169821380406, 0.00175}
      r = 0.03
      point1 = {-sqrt(0.0009-0.0004), -0.02}
      point2 = {-sqrt(0.0009-0.0004), 0.0235}
      angle1 = 226.468847833
      angle2 = 133.531152167
      clockwise = on
    ca3: CircularArc "圆弧 3"
      specify = endsr
      center = {0.00080423431871, 0.00175}
      r = 0.05
      point1 = {sqrt(0.0025-0.0004), -0.02}
      point2 = {sqrt(0.0025-0.0004), 0.0235}
      angle1 = 334.2147061216889
      angle2 = 25.7852938783
    ca4: CircularArc "圆弧 4"
      specify = endsr
      center = {-0.00080423431871, 0.00175}
      r = 0.05
      point1 = {-sqrt(0.0025-0.0004), -0.02}
      point2 = {-sqrt(0.0025-0.0004), 0.0235}
      angle1 = 205.7852938783111
      angle2 = 154.2147061216889
      clockwise = on
    sq1: Square "正方形 1" | pos = {-0.05, -0.02}; size = 0.005
    sq2: Square "正方形 2" | pos = {0.02, -0.02}; size = 0.005
    arr1: Array "阵列 1" | input = sq1; size = {6, 8}; fullsize = {6, 8}; displ = {0.005+0.0005, 0.005+0.0005}
    arr2: Array "阵列 2" | input = sq2; size = {6, 8}; fullsize = {6, 8}; displ = {0.005+0.0005, 0.005+0.0005}
    del1: Delete "删除实体 1"
      input = arr1(5,2), arr1(5,3), arr1(5,4), arr1(5,5), arr1(5,6), arr1(5,7), arr1(6,1), arr1(6,2), arr1(6,3), arr1(6,4), arr1(6,5), arr1(6,6), arr1(6,7), arr1(6,8), arr2(1,1), arr2(1,2), arr2(1,3), arr2(1,4), arr2(1,5), arr2(1,6), arr2(1,7), arr2(1,8), arr2(2,3), arr2(2,4), arr2(2,5), arr2(2,6)
    pol1: Polygon "多边形 1"
      source = table
      table = 
        {x1+d12_1, y1}
        {x1+d11_1+d12_1, y1}
        {x1+d11_1+d12_1, y1+d9_1}
        {x1+d, y1+d9_1}
        {x1+d, y1+d9_1+d8_1}
        {x1+d4_1+d5_1, y1+d9_1+d8_1}
        {x1+d4_1+d5_1, y1+d}
        {x1+d4_1, y1+d}
        {x1+d4_1, y1+d1_1+d2_1}
        {x1, y1+d1_1+d2_1}
        {x1, y1+d1_1}
        {x1+d12_1, y1+d1_1}
      addedrowidx = 11
      addedrow = {-0.0494986381323, -0.017903838407}
    pol2: Polygon "多边形 2"
      source = table
      table = 
        {x2+d12_2, y2}
        {x2+d11_2+d12_2, y2}
        {x2+d11_2+d12_2, y2+d9_2}
        {x2+d, y2+d9_2}
        {x2+d, y2+d9_2+d8_2}
        {x2+d4_2+d5_2, y2+d9_2+d8_2}
        {x2+d4_2+d5_2, y2+d}
        {x2+d4_2, y2+d}
        {x2+d4_2, y2+d1_2+d2_2}
        {x2, y2+d1_2+d2_2}
        {x2, y2+d1_2}
        {x2+d12_2, y2+d1_2}
      addedrowidx = 11
      addedrow = {-0.0439986381323, -0.017903838407}
    pol3: Polygon "多边形 3"
      source = table
      table = 
        {x3+d12_3, y3}
        {x3+d11_3+d12_3, y3}
        {x3+d11_3+d12_3, y3+d9_3}
        {x3+d, y3+d9_3}
        {x3+d, y3+d9_3+d8_3}
        {x3+d4_3+d5_3, y3+d9_3+d8_3}
        {x3+d4_3+d5_3, y3+d}
        {x3+d4_3, y3+d}
        {x3+d4_3, y3+d1_3+d2_3}
        {x3, y3+d1_3+d2_3}
        {x3, y3+d1_3}
        {x3+d12_3, y3+d1_3}
      addedrowidx = 11
      addedrow = {-0.0385038017853, -0.0176320691234}
    pol4: Polygon "多边形 4"
      source = table
      table = 
        {x4+d12_4, y4}
        {x4+d11_4+d12_4, y4}
        {x4+d11_4+d12_4, y4+d9_4}
        {x4+d, y4+d9_4}
        {x4+d, y4+d9_4+d8_4}
        {x4+d4_4+d5_4, y4+d9_4+d8_4}
        {x4+d4_4+d5_4, y4+d}
        {x4+d4_4, y4+d}
        {x4+d4_4, y4+d1_4+d2_4}
        {x4, y4+d1_4+d2_4}
        {x4, y4+d1_4}
        {x4+d12_4, y4+d1_4}
      addedrowidx = 11
      addedrow = {-0.0328806797894, -0.0180795124743}
    pol5: Polygon "多边形 5"
      source = table
      table = 
        {x5+d12_5, y5}
        {x5+d11_5+d12_5, y5}
        {x5+d11_5+d12_5, y5+d9_5}
        {x5+d, y5+d9_5}
        {x5+d, y5+d9_5+d8_5}
        {x5+d4_5+d5_5, y5+d9_5+d8_5}
        {x5+d4_5+d5_5, y5+d}
        {x5+d4_5, y5+d}
        {x5+d4_5, y5+d1_5+d2_5}
        {x5, y5+d1_5+d2_5}
        {x5, y5+d1_5}
        {x5+d12_5, y5+d1_5}
      addedrowidx = 11
      addedrow = {-0.0275843327993, -0.0178772144656}
    pol6: Polygon "多边形 6"
      source = table
      table = 
        {x6+d12_6, y6}
        {x6+d11_6+d12_6, y6}
        {x6+d11_6+d12_6, y6+d9_6}
        {x6+d, y6+d9_6}
        {x6+d, y6+d9_6+d8_6}
        {x6+d4_6+d5_6, y6+d9_6+d8_6}
        {x6+d4_6+d5_6, y6+d}
        {x6+d4_6, y6+d}
        {x6+d4_6, y6+d1_6+d2_6}
        {x6, y6+d1_6+d2_6}
        {x6, y6+d1_6}
        {x6+d12_6, y6+d1_6}
      addedrowidx = 11
      addedrow = {-0.0496437331197, -0.0127264019226}
    pol7: Polygon "多边形 7"
      source = table
      table = 
        {x7+d12_7, y7}
        {x7+d11_7+d12_7, y7}
        {x7+d11_7+d12_7, y7+d9_7}
        {x7+d, y7+d9_7}
        {x7+d, y7+d9_7+d8_7}
        {x7+d4_7+d5_7, y7+d9_7+d8_7}
        {x7+d4_7+d5_7, y7+d}
        {x7+d4_7, y7+d}
        {x7+d4_7, y7+d1_7+d2_7}
        {x7, y7+d1_7+d2_7}
        {x7, y7+d1_7}
        {x7+d12_7, y7+d1_7}
      addedrowidx = 11
      addedrow = {-0.0444499633783, -0.012989125658}
    pol8: Polygon "多边形 8"
      source = table
      table = 
        {x8+d12_8, y8}
        {x8+d11_8+d12_8, y8}
        {x8+d11_8+d12_8, y8+d9_8}
        {x8+d, y8+d9_8}
        {x8+d, y8+d9_8+d8_8}
        {x8+d4_8+d5_8, y8+d9_8+d8_8}
        {x8+d4_8+d5_8, y8+d}
        {x8+d4_8, y8+d}
        {x8+d4_8, y8+d1_8+d2_8}
        {x8, y8+d1_8+d2_8}
        {x8, y8+d1_8}
        {x8+d12_8, y8+d1_8}
      addedrowidx = 11
      addedrow = {-0.03895, -0.0130021263447}
    pol9: Polygon "多边形 9"
      source = table
      table = 
        {x9+d12_9, y9}
        {x9+d11_9+d12_9, y9}
        {x9+d11_9+d12_9, y9+d9_9}
        {x9+d, y9+d9_9}
        {x9+d, y9+d9_9+d8_9}
        {x9+d4_9+d5_9, y9+d9_9+d8_9}
        {x9+d4_9+d5_9, y9+d}
        {x9+d4_9, y9+d}
        {x9+d4_9, y9+d1_9+d2_9}
        {x9, y9+d1_9+d2_9}
        {x9, y9+d1_9}
        {x9+d12_9, y9+d1_9}
      addedrowidx = 11
      addedrow = {-0.03345, -0.0130358548867}
    pol10: Polygon "多边形 10"
      source = table
      table = 
        {x10+d12_10, y10}
        {x10+d11_10+d12_10, y10}
        {x10+d11_10+d12_10, y10+d9_10}
        {x10+d, y10+d9_10}
        {x10+d, y10+d9_10+d8_10}
        {x10+d4_10+d5_10, y10+d9_10+d8_10}
        {x10+d4_10+d5_10, y10+d}
        {x10+d4_10, y10+d}
        {x10+d4_10, y10+d1_10+d2_10}
        {x10, y10+d1_10+d2_10}
        {x10, y10+d1_10}
        {x10+d12_10, y10+d1_10}
      addedrowidx = 11
      addedrow = {-0.04995, -0.00655003662165}
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    dif1: Difference "求差 1" | input = arr1(1,1); input2 = pol1
    dif2: Difference "求差 2" | input = arr1(2,1); input2 = pol2
    dif3: Difference "求差 3" | input = arr1(3,1); input2 = pol3
    dif4: Difference "求差 4" | input = arr1(4,1); input2 = pol4
    dif5: Difference "求差 5" | input = arr1(5,1); input2 = pol5
    dif6: Difference "求差 6" | input = arr1(1,2); input2 = pol6
    dif7: Difference "求差 7" | input = arr1(2,2); input2 = pol7
    dif8: Difference "求差 8" | input = arr1(3,2); input2 = pol8
    dif9: Difference "求差 9" | input = arr1(4,2); input2 = pol9
    dif10: Difference "求差 10" | input = arr1(1,3); input2 = pol10
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    fin: Finalize "形成联合体"

Materials
  mat1: Common "Copper" on all domains
    def "Basic"
      relpermeability = 1
      electricconductivity = 5.998e7[S/m]
      thermalexpansioncoefficient = 17e-6[1/K]
      heatcapacity = 385[J/(kg*K)]
      relpermittivity = 1
      density = 8960[kg/m^3]
      thermalconductivity = 400[W/(m*K)]
    Enu "Young's modulus and Poisson's ratio"
      youngsmodulus = 110e9[Pa]
      poissonsratio = 0.35
    linzRes "Linearized resistivity"
      rho0 = 1.72e-8[ohm*m]
      alpha = 0.0039[1/K]
      Tref = 298[K]

Physics
  ht: HeatTransfer "固体传热" on all domains
    dependent variable T
    solid1: SolidHeatTransferModel "固体 1" (default)
    init1: init "初始值 1" (default) | Tinit = 200[K]
    ins1: ThermalInsulation "热绝缘 1" (default)
    solid2: SolidHeatTransferModel "固体 2" on domains 6, 9, 13-16, 48, 49
      k_mat = userdef
      k = {k*(r*a/r_1*cos^2+r_1/(r*a)*sin^2), k*(sin*cos*(a*r/r_1-r_1/(a*r))), 0, k*(sin*cos*(a*r/r_1-r_1/(a*r))), k*(r*a/r_1*sin^2+r_1/(r*a)*cos^2), 0, 0, 0, 0}
    temp1: TemperatureBoundary "温度 1" on boundaries 1, 372 | T0 = 220[K]
    temp2: TemperatureBoundary "温度 2" on boundaries 38, 39, 41, 49, 51, 73, 75, 83, 85, 107, 109, 117, 119, 141, 153, 163, 165, 169, 173, 177-181, 183, 195, 203, 207, 209, 233, 241, 249, 251, 273, 275, 283, 285, 307-309, 311, 321, 323, 347, 372
      T0 = 200[K]
    ins2: ThermalInsulation "热绝缘 2" on boundaries 2, 3, 5, 29, 178, 179, 363, 371
    solid4: SolidHeatTransferModel "固体 3" on domains 56, 61-64, 98-105
      k_mat = userdef
      k = {k*(r*a/r_b*cos^2+r_b/(r*a)*sin^2), k*(sin*cos*(a*r/r_b-r_b/(a*r))), 0, k*(sin*cos*(a*r/r_b-r_b/(a*r))), k*(r*a/r_b*sin^2+r_b/(r*a)*cos^2), 0, 0, 0, 0}
    solid5: SolidHeatTransferModel on domains 2, 12, 15, 16 | k_mat = userdef; k = diag{84.68, 290.31, 0}
    solid6: SolidHeatTransferModel on domains 17, 24 | k_mat = userdef; k = diag{91.83, 290.31, 0}
    solid7: SolidHeatTransferModel on domains 25, 32 | k_mat = userdef; k = diag{103.34, 308.49, 0}
    solid8: SolidHeatTransferModel on domains 33, 40 | k_mat = userdef; k = diag{121.83, 315.18, 0}
    solid9: SolidHeatTransferModel on domains 48-51 | k_mat = userdef; k = diag{151.71, 316.78, 0}
    solid11: SolidHeatTransferModel on domains 3, 11, 13, 14 | k_mat = userdef; k = diag{69.38, 310.56, 0}
    solid12: SolidHeatTransferModel on domains 18, 23 | k_mat = userdef; k = diag{72.30, 326.05, 0}
    solid13: SolidHeatTransferModel on domains 26, 31 | k_mat = userdef; k = diag{78.04, 343.47, 0}
    solid14: SolidHeatTransferModel on domains 34, 39, 46, 47 | k_mat = userdef; k = diag{88.74, 362.47, 0}
    solid16: SolidHeatTransferModel on domains 4, 6, 9, 10 | k_mat = userdef; k = diag{57.64, 325.89, 0}
    solid17: SolidHeatTransferModel on domains 19, 22 | k_mat = userdef; k = diag{56.79, 346.60, 0}
    solid18: SolidHeatTransferModel on domains 27, 30 | k_mat = userdef; k = diag{57.01, 371.83, 0}
    solid19: SolidHeatTransferModel on domains 35, 38, 44, 45 | k_mat = userdef; k = diag{59.34, 402.98, 0}
    solid20: SolidHeatTransferModel on domains 7, 8 | k_mat = userdef; k = diag{51.23, 334.19, 0}
    solid21: SolidHeatTransferModel on domains 20, 21 | k_mat = userdef; k = diag{48.14, 357.94, 0}
    solid22: SolidHeatTransferModel on domains 28, 29 | k_mat = userdef; k = diag{44.92, 387.89, 0}
    solid23: SolidHeatTransferModel on domains 36, 37, 42, 43 | k_mat = userdef; k = diag{41.67, 426.82, 0}
    solid24: SolidHeatTransferModel (disabled) on domains 8 | k_mat = userdef; k = diag{51.23, 334.19, 0}
    solid25: SolidHeatTransferModel (disabled) on domains 21
      k_mat = userdef
      k = diag{148.150125491425, 1101.35452229768, 0}
    solid26: SolidHeatTransferModel (disabled) on domains 29
      k_mat = userdef
      k = diag{138.241551203113, 1193.51707074558, 0}
    solid27: SolidHeatTransferModel (disabled) on domains 37, 43
      k_mat = userdef
      k = diag{128.233250088377, 1313.30398937857, 0}
    solid28: SolidHeatTransferModel (disabled) on domains 9, 10
      k_mat = userdef
      k = diag{177.376082282350, 1002.74705556507, 0}
    solid29: SolidHeatTransferModel (disabled) on domains 22
      k_mat = userdef
      k = diag{174.762190505180, 1066.47900584680, 0}
    solid30: SolidHeatTransferModel (disabled) on domains 30
      k_mat = userdef
      k = diag{175.442997876248, 1144.10367496511, 0}
    solid31: SolidHeatTransferModel (disabled) on domains 38, 45
      k_mat = userdef
      k = diag{182.606391761589, 1239.96178148821, 0}
    solid32: SolidHeatTransferModel (disabled) on domains 11, 14
      k_mat = userdef
      k = diag{213.506125260621, 955.570771781518, 0}
    solid33: SolidHeatTransferModel (disabled) on domains 23
      k_mat = userdef
      k = diag{222.471710128899, 1003.26081215582, 0}
    solid34: SolidHeatTransferModel (disabled) on domains 31
      k_mat = userdef
      k = diag{240.145423332380, 1056.85761106328, 0}
    solid35: SolidHeatTransferModel (disabled) on domains 39, 47
      k_mat = userdef
      k = diag{273.055147341989, 1115.32276836338, 0}
    solid36: SolidHeatTransferModel (disabled) on no domains
      k_mat = userdef
      k = diag{333.732675919033, 1174.24392374952, 0}
    solid37: SolidHeatTransferModel (disabled) on domains 12, 16
      k_mat = userdef
      k = diag{260.555237151779, 893.269213740877, 0}
    solid38: SolidHeatTransferModel (disabled) on domains 24
      k_mat = userdef
      k = diag{282.566705124988, 922.135350143251, 0}
    solid39: SolidHeatTransferModel (disabled) on domains 32
      k_mat = userdef
      k = diag{317.970439853759, 949.205053363147, 0}
    solid40: SolidHeatTransferModel (disabled) on domains 40
      k_mat = userdef
      k = diag{374.866768952230, 969.808151651012, 0}
    solid41: SolidHeatTransferModel (disabled) on domains 49, 51
      k_mat = userdef
      k = diag{466.824889885576, 974.712349581373, 0}
    solid42: SolidHeatTransferModel (disabled) on no domains
      k_mat = userdef
      k = diag{616.105732618806, 946.521094644041, 0}
    solid43: SolidHeatTransferModel "固体 43" (disabled) on domains 3, 7, 9, 10, 12, 13, 16, 17, 19, 21, 23, 26, 28, 30, 32, 33, 35, 37, 39, 43, 44, 47, 49, 51
      k_mat = userdef
      k = 400
  ht2: HeatTransfer "固体传热 2" on all domains
    dependent variable T2
    solid1: SolidHeatTransferModel "固体 1" (default)
    init1: init "初始值 1" (default)
    ins1: ThermalInsulation "热绝缘 1" (default)
    temp1: TemperatureBoundary "温度 1" on boundaries 1, 372 | T0 = 330[K]
    temp2: TemperatureBoundary "温度 2" on boundaries 1, 38, 39, 41, 49, 51, 73, 75, 83, 85, 107, 109, 117, 119, 141, 153, 163, 165, 169, 173, 177, 180, 181, 183, 195, 203, 207, 209, 233, 241, 249, 251, 273, 275, 283, 285, 307-309, 311, 321, 323, 347
      T0 = 200[K]
    ins2: ThermalInsulation "热绝缘 2" on boundaries 2, 3, 5, 29, 178, 179, 363, 371
    solid4: SolidHeatTransferModel on domains 2, 15
      Solid_material = dommat
      k = diag{260.555237151779, 893.269213740877, 0}
      pref = 1[atm]
      dfltopaque = 1
    solid5: SolidHeatTransferModel on domains 1, 17
      Solid_material = dommat
      k = diag{282.566705124988, 922.135350143251, 0}
      pref = 1[atm]
      dfltopaque = 1
    solid6: SolidHeatTransferModel on domains 25
      Solid_material = dommat
      k = diag{317.970439853759, 949.205053363147, 0}
      pref = 1[atm]
      dfltopaque = 1
    solid7: SolidHeatTransferModel on domains 33
      Solid_material = dommat
      k = diag{374.866768952230, 969.808151651012, 0}
      pref = 1[atm]
      dfltopaque = 1
    solid8: SolidHeatTransferModel on domains 48, 50
      Solid_material = dommat
      k = diag{466.824889885576, 974.712349581373, 0}
      pref = 1[atm]
      dfltopaque = 1
    solid9: SolidHeatTransferModel on no domains
      Solid_material = dommat
      k = diag{616.105732618806, 946.521094644041, 0}
      pref = 1[atm]
      dfltopaque = 1
    solid10: SolidHeatTransferModel on domains 3, 13
      Solid_material = dommat
      k = diag{213.506125260621, 955.570771781518, 0}
      pref = 1[atm]
      dfltopaque = 1
    solid11: SolidHeatTransferModel on domains 18
      Solid_material = dommat
      k = diag{222.471710128899, 1003.26081215582, 0}
      pref = 1[atm]
      dfltopaque = 1
    solid12: SolidHeatTransferModel on domains 26
      Solid_material = dommat
      k = diag{240.145423332380, 1056.85761106328, 0}
      pref = 1[atm]
      dfltopaque = 1
    solid13: SolidHeatTransferModel on domains 34, 46
      Solid_material = dommat
      k = diag{273.055147341989, 1115.32276836338, 0}
      pref = 1[atm]
      dfltopaque = 1
    solid14: SolidHeatTransferModel on no domains
      Solid_material = dommat
      k = diag{333.732675919033, 1174.24392374952, 0}
      pref = 1[atm]
      dfltopaque = 1
    solid15: SolidHeatTransferModel on domains 4, 6
      Solid_material = dommat
      k = diag{177.376082282350, 1002.74705556507, 0}
      pref = 1[atm]
      dfltopaque = 1
    solid16: SolidHeatTransferModel on domains 19
      Solid_material = dommat
      k = diag{174.762190505180, 1066.47900584680, 0}
      pref = 1[atm]
      dfltopaque = 1
    solid17: SolidHeatTransferModel on domains 27
      Solid_material = dommat
      k = diag{175.442997876248, 1144.10367496511, 0}
      pref = 1[atm]
      dfltopaque = 1
    solid18: SolidHeatTransferModel on domains 35, 44
      Solid_material = dommat
      k = diag{182.606391761589, 1239.96178148821, 0}
      pref = 1[atm]
      dfltopaque = 1
    solid19: SolidHeatTransferModel on domains 7
      Solid_material = dommat
      k = diag{157.651836563414, 1028.28756165351, 0}
      pref = 1[atm]
      dfltopaque = 1
    solid20: SolidHeatTransferModel on domains 20
      Solid_material = dommat
      k = diag{148.150125491425, 1101.35452229768, 0}
      pref = 1[atm]
      dfltopaque = 1
    solid21: SolidHeatTransferModel on domains 28
      Solid_material = dommat
      k = diag{138.241551203113, 1193.51707074558, 0}
      pref = 1[atm]
      dfltopaque = 1
    solid22: SolidHeatTransferModel on domains 36, 42
      Solid_material = dommat
      k = diag{128.233250088377, 1313.30398937857, 0}
      pref = 1[atm]
      dfltopaque = 1
    solid23: SolidHeatTransferModel on domains 8
      Solid_material = dommat
      k = diag{157.651836563414, 1028.28756165351, 0}
      pref = 1[atm]
      dfltopaque = 1
    solid24: SolidHeatTransferModel on domains 21
      Solid_material = dommat
      k = diag{148.150125491425, 1101.35452229768, 0}
      pref = 1[atm]
      dfltopaque = 1
    solid25: SolidHeatTransferModel on domains 29
      Solid_material = dommat
      k = diag{138.241551203113, 1193.51707074558, 0}
      pref = 1[atm]
      dfltopaque = 1
    solid26: SolidHeatTransferModel on domains 37, 43
      Solid_material = dommat
      k = diag{128.233250088377, 1313.30398937857, 0}
      pref = 1[atm]
      dfltopaque = 1
    solid27: SolidHeatTransferModel on domains 9, 10
      Solid_material = dommat
      k = diag{177.376082282350, 1002.74705556507, 0}
      pref = 1[atm]
      dfltopaque = 1
    solid28: SolidHeatTransferModel on domains 22
      Solid_material = dommat
      k = diag{174.762190505180, 1066.47900584680, 0}
      pref = 1[atm]
      dfltopaque = 1
    solid29: SolidHeatTransferModel on domains 30
      Solid_material = dommat
      k = diag{175.442997876248, 1144.10367496511, 0}
      pref = 1[atm]
      dfltopaque = 1
    solid30: SolidHeatTransferModel on domains 38, 45
      Solid_material = dommat
      k = diag{182.606391761589, 1239.96178148821, 0}
      pref = 1[atm]
      dfltopaque = 1
    solid31: SolidHeatTransferModel on domains 11, 14
      Solid_material = dommat
      k = diag{213.506125260621, 955.570771781518, 0}
      pref = 1[atm]
      dfltopaque = 1
    solid32: SolidHeatTransferModel on domains 23
      Solid_material = dommat
      k = diag{222.471710128899, 1003.26081215582, 0}
      pref = 1[atm]
      dfltopaque = 1
    solid33: SolidHeatTransferModel on domains 31
      Solid_material = dommat
      k = diag{240.145423332380, 1056.85761106328, 0}
      pref = 1[atm]
      dfltopaque = 1
    solid34: SolidHeatTransferModel on domains 39, 47
      Solid_material = dommat
      k = diag{273.055147341989, 1115.32276836338, 0}
      pref = 1[atm]
      dfltopaque = 1
    solid35: SolidHeatTransferModel on no domains
      Solid_material = dommat
      k = diag{333.732675919033, 1174.24392374952, 0}
      pref = 1[atm]
      dfltopaque = 1
    solid36: SolidHeatTransferModel on domains 12, 16
      Solid_material = dommat
      k = diag{260.555237151779, 893.269213740877, 0}
      pref = 1[atm]
      dfltopaque = 1
    solid37: SolidHeatTransferModel on domains 24
      Solid_material = dommat
      k = diag{282.566705124988, 922.135350143251, 0}
      pref = 1[atm]
      dfltopaque = 1
    solid38: SolidHeatTransferModel on domains 32
      Solid_material = dommat
      k = diag{317.970439853759, 949.205053363147, 0}
      pref = 1[atm]
      dfltopaque = 1
    solid39: SolidHeatTransferModel on domains 40
      Solid_material = dommat
      k = diag{374.866768952230, 969.808151651012, 0}
      pref = 1[atm]
      dfltopaque = 1
    solid40: SolidHeatTransferModel on domains 49, 51
      Solid_material = dommat
      k = diag{466.824889885576, 974.712349581373, 0}
      pref = 1[atm]
      dfltopaque = 1
    solid41: SolidHeatTransferModel on no domains
      Solid_material = dommat
      k = diag{616.105732618806, 946.521094644041, 0}
      pref = 1[atm]
      dfltopaque = 1
    solid42: SolidHeatTransferModel "固体 42" on domains 56-61, 63-94, 97-106, 108-113

Mesh
  mesh1 "网格 1"
    size: MeshSizeDefault "大小" | hmax = 0.0101; hmin = 4.5E-5; hcurve = 0.3; hgrad = 1.3
    ftri1: FreeTri "自由三角形网格 1" on remaining entities

Studies
  std1 "研究 1"
    stat: Stationary "稳态" | solve for = {ht}

Tables
  tbl1: Table "探针表 1"
    温度 (K), 边界探针 1 | 温度 (K), 边界探针 2
    -0.151659 | -1.19902e-12

Plots
  pg5: PlotGroup1D "探针绘图组 5" | data = none
    tblp1: Table "探针表图 1" | table = tbl1; xaxisdata = auto; plotcolumns = 1
  pg6: PlotGroup1D "探针绘图组 6"
    tblp1: Table "探针表图 1" | table = tbl1; xaxisdata = auto; plotcolumns = 2