// COMSOL Multiphysics 5.6.0.280 model "cross-shape-diff-vertical_238_44.mph"
// Outline of the model tree

Parameters
  d1 = 0.02341084916456855[m]
  d2 = 0.5858411535820554[m]
  d3 = 0.39074799725337606[m]
  d4 = 0.47437720302128633[m]
  d = 1[m]
  d5 = 0.04759075303273069[m]
  d6 = 0.47803204394598303[m]
  d7 = 0.30529503318837264[m]
  d8 = 0.6111320668345159[m]
  d9 = 0.08357289997711147[m]
  d10 = 0.3944028381780728[m]
  d11 = 0.20730510414282438[m]
  d12 = 0.39829205767910275[m]

Probes
  bnd1: Boundary "边界探针 1" on boundaries 7 | expr = T; unit = K; descr = 温度; table = tbl1
  bnd2: Boundary "边界探针 2" on boundaries 9 | expr = T; unit = K; descr = 温度; table = tbl1

Geometry
  geom1 "几何 1" (3D, length unit m)
    blk1: Block "长方体 1" | size = {d, d, d}
    blk2: Block "长方体 2" | pos = {0, 0, d-d3}; size = {d4, d, d3}
    blk3: Block "长方体 3" | pos = {d-d6, 0, d-d7}; size = {d6, d, d7}
    blk4: Block "长方体 4" | pos = {d-d10, 0, 0}; size = {d10, 1, d9}
    blk5: Block "长方体 5" | size = {d12, 1, d1}
    dif1: Difference "求差 1" | input = blk1; input2 = blk2, blk3, blk4, blk5
    fin: Finalize "形成联合体"

Materials
  mat1: Common "Copper" on domains 1
    def "Basic"
      relpermeability = 1
      electricconductivity = 5.998e7[S/m]
      heatcapacity = 385[J/(kg*K)]
      relpermittivity = 1
      emissivity = 0.5
      density = 8940[kg/m^3]
      thermalconductivity = 400[W/(m*K)]
    Enu "Young's modulus and Poisson's ratio"
      youngsmodulus = 126e9[Pa]
      poissonsratio = 0.34
    linzRes "Linearized resistivity"
      rho0 = 1.667e-8[ohm*m]
      alpha = 3.862e-3[1/K]
      Tref = 293.15[K]

Physics
  ht: HeatTransfer "固体传热" on all domains
    dependent variable T
    solid1: SolidHeatTransferModel "固体 1" (default)
    init1: init "初始值 1" (default)
    ins1: ThermalInsulation "热绝缘 1" (default)
    hf1: HeatFluxBoundary "热通量 1" on boundaries 7 | q0 = 10000
    solid2: SolidHeatTransferModel "固体 2" (disabled) on no domains
      k_mat = userdef
      k = 0.15
      rho_mat = from_mat
      Cp_mat = from_mat
    temp1: TemperatureBoundary "温度 1" on boundaries 9

Mesh
  mesh1 "网格 1" (physics-controlled)
    size: MeshSizeDefault "大小" | hauto = 4

Studies
  std1 "研究 1"
    stat: Stationary "稳态"

Solver configurations
  sol1 "解 1" (study std1)
    v1: Variables "因变量 1"
    s1: Stationary "稳态求解器 1"
      fc1: FullyCoupled "全耦合 1" | linsolver = d1; initstep = 0.01; minstep = 1.0E-6; maxiter = 50
      d1: Direct "直接，温度 (ht)" | linsolver = pardiso; pivotperturb = 1.0E-13

Datasets
  dset1: Solution | solution = sol1
  dset3: Solution "探针解 3" | solution = sol1
  avh1: Average "边界探针 1" on boundaries 7 | data = dset3
  dset4: Solution "探针解 4" | solution = sol1
  avh2: Average "边界探针 2" on boundaries 9 | data = dset3

Derived values
  pev1: EvalPoint "边界探针 1" | data = avh1; table = tbl1; expr = T
  pev2: EvalPoint "边界探针 2" | data = avh2; table = tbl1; expr = T

Tables
  tbl1: Table "探针表 1"
    温度 (K), 边界探针 1 | 温度 (K), 边界探针 2
    315.812 | 293.15

Plots
  pg1: PlotGroup3D "三维绘图组 1"
  pg2: PlotGroup3D "温度 (ht)" | data = dset1
    vol1: Volume "体 1" | expr = T
  pg3: PlotGroup3D "等温线 (ht)" | data = dset1
    iso1: Isosurface "等值面" | expr = T; levelrounding = off
  pg6: PlotGroup1D "探针绘图组 6"
    tblp1: Table "探针表图 1" | table = tbl1; xaxisdata = auto; plotcolumns = {1, 2}